# ------------------------------
# 1) INITIALIZATION
# ------------------------------
variable T_start equal 10.0       # Starting temperature
variable T_end   equal 773.15     # Annealing target temperature

units real
atom_style charge
boundary p p p

read_data f_diamane_fixed.data

# ------------------------------
# 2) INTERACTION MODEL
# ------------------------------
pair_style reaxff NULL safezone 3.0 mincap 150
pair_coeff * * ffield.reax.FC.txt C F

# ------------------------------
# 3) GROUPS & CHARGES
# ------------------------------
group carbon type 1
group fluorine type 2
group all_atoms union carbon fluorine

fix qeq all_atoms qeq/reaxff 100 0.0 10.0 1.0e-6 reaxff

# ------------------------------
# 4) PRE-ANNEAL RELAXATION
# ------------------------------
fix boxrelax all_atoms box/relax x 0.0 y 0.0 vmax 0.001
minimize 1.0e-6 1.0e-9 1000 10000
unfix boxrelax

velocity all_atoms create ${T_start} 4928459 mom yes rot yes dist gaussian

# ------------------------------
# 5) PHASE 1: Temperature Ramp
# ------------------------------
fix temp_ramp all_atoms nvt temp ${T_start} ${T_end} 50
timestep 0.25
thermo 100
run 10000   # 2.5 ps temperature ramp

unfix temp_ramp

# ------------------------------
# 6) PHASE 2: Hold at T_end
# ------------------------------
fix anneal all_atoms nvt temp ${T_end} ${T_end} 50
fix reax_bonds all_atoms reaxff/bonds 100 bonds.reax

dump traj all_atoms custom 500 dump.lammpstrj id type x y z q
run 90000   # 22.5 ps hold at 773.15 K

# Total simulation time = 25 ps
